OpenVSP model (file version 5), 5 components.
Geometry view with OpenVSP parameter names; values to 6 digits, angles in degrees, lengths in the model's unit.
Overall bounding box: X_Min=0 X_Len=50 Y_Min=-30 Y_Len=60 Z_Min=-9.25 Z_Len=18.5

Fuselage "FuselageCockpitGeometry"
  location (X Y Z) 0 0 0, rotation 0 0 0
  bounding box size 33 5.7 7.10859
  Design: Length=33
  cross sections:
    n  XLocPercent  YLocPercent  ZLocPercent  shape
    0  0            0            0            point
    1  0.106061     0            0            edit curve Width=3 Height=2.5 AbsoluteFlag=1 SymType=1 cubic Bezier points (X Y): 0.5 0.1, 0.269178 -0.37726, 0.170548 -0.44, 0 -0.44, -0.170548 -0.44, -0.269178 -0.37726, -0.5 0.1, -0.265068 0.5, -0.141781 0.56, 0 0.56, 0.141781 0.56, 0.265068 0.5, 0.5 0.1
    2  0.212121     0            0            edit curve Width=4.4 Height=3.7 AbsoluteFlag=1 SymType=1 cubic Bezier points (X Y): 0.5 0.135135, 0.219863 -0.459459, 0.06681 -0.459459, 0 -0.459459, -0.06681 -0.459459, -0.219863 -0.459459, -0.5 0.135135, -0.265068 0.540541, -0.141781 0.540541, 0 0.540541, 0.141781 0.540541, 0.265068 0.540541, 0.5 0.135135
    3  0.424242     0            0            edit curve Width=5.5 Height=7.1 AbsoluteFlag=1 SymType=1 cubic Bezier points (X Y): 0.499502 0.140845, 0.169489 -0.316901, 0.107223 -0.316901, 0 -0.316901, -0.107223 -0.316901, -0.169489 -0.316901, -0.499502 0.140845, -0.164259 0.683099, -0.128144 0.683099, 0 0.683099, 0.128144 0.683099, 0.164259 0.683099, 0.499502 0.140845
    4  0.484848     0            0            edit curve Width=5.7 Height=7 AbsoluteFlag=1 SymType=1 cubic Bezier points (X Y): 0.5 0.142857, 0.169988 -0.321429, 0.107223 -0.321429, 0 -0.321429, -0.107223 -0.321429, -0.169988 -0.321429, -0.5 0.142857, -0.133375 0.657143, -0.128144 0.657143, 0 0.657143, 0.128144 0.657143, 0.133375 0.657143, 0.5 0.142857
    5  1            0            0            edit curve Width=5.7 Height=4.5 AbsoluteFlag=1 SymType=1 cubic Bezier points (X Y): 0.5 0.222222, 0.169988 -0.5, 0.107223 -0.5, 0 -0.5, -0.107223 -0.5, -0.169988 -0.5, -0.5 0.222222, -0.133375 0.5, -0.128144 0.5, 0 0.5, 0.128144 0.5, 0.133375 0.5, 0.5 0.222222
  SS_Ellipse "SS_ELLIP_0": Center_U=0.602941 Center_W=0.75 U_Length=0.308824 W_Length=0.382353

Custom "UnfoldedWingspan"
  location (X Y Z) 0 0 0, rotation 0 0 0
  bounding box size 50 60 18.5
  Design: Height=18.5 Length=50 SquareFlag=0 Width=60
  custom script Box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

Custom "FoldedWingspan"
  location (X Y Z) 0 0 0, rotation 0 0 0
  bounding box size 50 35 18.5
  Design: Height=18.5 Length=50 SquareFlag=0 Width=35
  custom script Box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

Stack "FuselageChine"
  location (X Y Z) 16 0 1, rotation 0 0 0
  bounding box size 33 13 2.5
  cross sections:
    n  XDelta  YDelta  ZDelta  shape
    0  0       0       0       edit curve Width=5.5 Height=1.25 AbsoluteFlag=1 SymType=1 cubic Bezier points (X Y): 0.5 0, 0.363636 0, 0.272727 0, 0 0, -0.272727 0, -0.363636 0, -0.5 0, -0.0909091 0.6, -0.181818 1, 0 1, 0.181818 1, 0.0909091 0.6, 0.5 0
    1  3       0       0       edit curve Width=12 Height=1.25 AbsoluteFlag=1 SymType=1 cubic Bezier points (X Y): 0.5 0, 0.363636 0, 0.272727 0, 0 0, -0.272727 0, -0.363636 0, -0.5 0, -0.217345 0.754244, -0.181818 1, 0 1, 0.181818 1, 0.217345 0.754244, 0.5 0
    2  6       0       0       edit curve Width=13 Height=2 AbsoluteFlag=1 SymType=1 cubic Bezier points (X Y): 0.5 0, 0.363636 0, 0.272727 0, 0 0, -0.272727 0, -0.363636 0, -0.5 0, -0.240411 0.701918, -0.181818 1, 0 1, 0.181818 1, 0.240411 0.701918, 0.5 0
    3  24      0       0       edit curve Width=13 Height=2.5 AbsoluteFlag=1 SymType=1 cubic Bezier points (X Y): 0.5 0, 0.363636 0, 0.272727 0, 0 0, -0.272727 0, -0.363636 0, -0.5 0, -0.240411 0.701918, -0.181818 1, 0 1, 0.181818 1, 0.240411 0.701918, 0.5 0

Wing "WingGeom"
  location (X Y Z) 16 0 1, rotation 0 0 0
  symmetric about XZ
  bounding box size 27.0002 45 0.696287
  totals: TotalSpan=45 TotalProjectedSpan=45 TotalChord=14.85 TotalArea=668.25 TotalAR=3.0303 MAC=18.1636
  root: chord 27, twist 0, NACA 64-series A=1 IdealCl=0.2 ThickChord=0.02
  sections:
    n  Span  Root_Chord  Tip_Chord  Area     Sweep  Sweep_Location  Dihedral  Twist  Twist_Location  tip airfoil
    1  22.5  27          2.7        334.125  35     0.25            0         0      0.25            NACA 4-series Camber=0 CamberLoc=0.2 ThickChord=0.1
